!
! File created at Tue Mar 28 16:20:53 2017
!
! This template extracts the FEModeler mesh in a format
! compatible with Mechanical APDL input.
!
/PREP7
SHPP,OFF
/NOPR
!
! COORDINATE SYSTEMS
!
!
! MATERIAL PROPERTIES
!
!
! PHYSICAL PROPERTIES
!
!
! ELEMENT TYPES
!
/com, Element Types <SECTION=ELEMENTTYPES>
et,1,MESH200
keyopt,1,1,11
!
! NODES
!
nblock,3
(1i9,3e21.13e3)
        1 9.1666666666667E+003 9.1666666666667E+003 9.1666666666667E+003
        2 8.3333333333333E+003 9.1666666666667E+003 9.1666666666667E+003
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! end of nblock command
!
! ELEMENTS
!
/com, Elements <SECTION=ELEMENTS>
eblock,19,solid,1729
(19i9)
        0        1        1        0        0        0        0        0       20        0        1        1     1922     1755     1622     1452     2053     1754     1743
     2203     7446     7181     2202     6817     7444     7432     6816     2201     7767     7443     7180
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-1
! end of eblock command
!
! INTERFACE REGIONS
!
!
! COMPONENTS
!
!
! BOUNDARY CONDITIONS
!
!
! LOADS
!
!
! Solution
!
!
! Turn output back on
!
/GOPR
!
FINI

/GOPR
